solve block
    # guess values
    P2000 := 0
    P1010 := 0
    P1110 := 0
    P1210 := 0
    π1 := 0.5
    P1000 := 0
    P2011 := 0
    P2111 := 0
    P2211 := 0
    π2 := 0.5
    P2010 := 0
    P2110 := 0
    P2210 := 0
    P1211 := 0
    P1001 := 0
    P1011 := 0
    P1111 := 0
    # constraints
    P2000 + P1000 + P2010 + P1001 + P1010 + P2011 + P2110 + P1011 + P1110 + P2111 + P2210 + P1111 + P1210 + P2211 + P1211 == 1
    P1000 == 0
    P2010 == P1001*(1 - π2)
    P1001 == P2010*(1 - π1) + P2011*((1 - π1)*(1 - π2) + (1 - π1)*π2)
    P1010 == P2010*π1 + P2011*(1 - π2)*π1
    P2011 == P1001*π2 + P1010*(1 - π1) + P1011*((1 - π1)*(1 - π2) + (1 - π1)*π2)
    P2110 == P1010*π1 + P1011*(1 - π2)*π1
    P1011 == P2011*(π1*π2) + P2110*(1 - π1) + P2111*((1 - π1)*(1 - π2) + (1 - π1)*π2)
    P1110 == P2110*π1 + P2111*(1 - π2)*π1
    P2111 == P1011*(π1*π2) + P1110*(1 - π1) + P1111*((1 - π1)*(1 - π2) + (1 - π1)*π2)
    P2210 == P1110*π1 + P1111*(1 - π2)*π1 + P1210*π1 + P1211*(1 - π2)*π1
    P1111 == P2111*(π1*π2) + P2210*(1 - π1) + P2211*((1 - π1)*(1 - π2) + (1 - π1)*π2)
    P1210 == P2210*π1 + P2211*((1 - π2)*π1)
    P2211 == P1111*(π1*π2) + P1210*(1 - π1) + P1211*((1 - π1)*(1 - π2) + (1 - π1)*π2 + (π1*π2))
    P1211 == P2211*(π1*π2)
    # solver
    result := Find(P2000, P1000, P2010, P1001, P1010, P2011, P2110, P1011, P1110, P2111, P2210, P1111, P1210, P2211, P1211)
    A := (1 - result(2) - result(4) - result(6) - result(8) - result(10) - result(12))*(1 - π2) = 0.319444
    L_оч := (result(0)*0) + (result(1)*0) + (result(2)*0) + (result(3)*0) + (result(4)*0) + (result(5)*0) + (result(7)*0)
    L_оч := L_оч + (result(6)*1) + (result(8)*1) + (result(9)*1) + (result(11)*1)
    L_оч := L_оч + (result(10)*2) + (result(11)*2) + (result(13)*2) + (result(14)*2)
    L_оч = 0.926389
    P_отк := 1 - A/0.5 = 0.361111
end solve block
result = [-1.20857e-8; 0; 0.0416667; 0.0833333; 0.0520833; 0.125; 0.0546875; 0.114583; 0.0553385; 0.111979; 0.0925347; 0.111328; 0.0648003; 0.0741319; 0.018533]
