result := 1
solve block
    # guess values
    P00 := 1
    P40 := 1
    P80 := 1
    P120 := 1
    P160 := 1
    P200 := 1
    P10 := 1
    P50 := 1
    P90 := 1
    P130 := 1
    P170 := 1
    P210 := 1
    P20 := 1
    P60 := 1
    P100 := 1
    P140 := 1
    P180 := 1
    P30 := 1
    P70 := 1
    P110 := 1
    P150 := 1
    P190 := 1
    P01 := 1
    P04 := 1
    P07 := 1
    P010 := 1
    μ := 12
    ω := μ/λ
    P02 := 1
    P05 := 1
    P08 := 1
    P011 := 1
    λ := 12
    P03 := 1
    P06 := 1
    P09 := 1
    # constraints
    (λ + μ)*P00 == λ*P01 + μ*P10
    (λ + μ)*P01 == λ*P02 + μ*P00
    (λ + μ)*P02 == λ*P03 + μ*P01
    (λ + μ)*P10 == λ*P00 + μ*P20
    (λ + μ)*P110 == λ*P100 + μ*P120
    μ*P210 == λ*P200
    (λ + μ)*P03 == λ*P04 + μ*P02
    (λ + μ)*P20 == λ*P10 + μ*P30
    (λ + μ)*P120 == λ*P110 + μ*P130
    (λ + μ)*P04 == λ*P05 + μ*P03
    (λ + μ)*P30 == λ*P20 + μ*P40
    (λ + μ)*P130 == λ*P120 + μ*P140
    (λ + μ)*P05 == λ*P06 + μ*P04
    (λ + μ)*P40 == λ*P30 + μ*P50
    (λ + μ)*P140 == λ*P130 + μ*P150
    (λ + μ)*P06 == λ*P07 + μ*P05
    (λ + μ)*P50 == λ*P40 + μ*P60
    (λ + μ)*P150 == λ*P140 + μ*P160
    (λ + μ)*P07 == λ*P08 + μ*P06
    (λ + μ)*P60 == λ*P50 + μ*P70
    (λ + μ)*P160 == λ*P150 + μ*P170
    (λ + μ)*P08 == λ*P09 + μ*P07
    (λ + μ)*P70 == λ*P60 + μ*P80
    (λ + μ)*P170 == λ*P160 + μ*P180
    (λ + μ)*P09 == λ*P010 + μ*P08
    (λ + μ)*P80 == λ*P70 + μ*P90
    (λ + μ)*P180 == λ*P170 + μ*P190
    (λ + μ)*P010 == λ*P011 + μ*P09
    (λ + μ)*P90 == λ*P80 + μ*P100
    (λ + μ)*P190 == λ*P180 + μ*P200
    (λ + μ)*P100 == λ*P90 + μ*P110
    (λ + μ)*P200 == λ*P190 + μ*P210
    P00 + P01 + P02 + P03 + P04 + P05 + P06 + P07 + P08 + P09 + P010 + P10 + P20 + P30 + P40 + P50 + P60 + P70 + P80 + P90 + P100 + P110 + P120 + P130 + P140 + P150 + P160 + P170 + P180 + P190 + P200 + P011 + P210 == 1
    # solver
    result := Find(P00, P01, P02, P03, P04, P05, P06, P07, P08, P09, P010, P10, P20, P30, P40, P50, P60, P70, P80, P90, P100, P110, P120, P130, P140, P150, P160, P170, P180, P190, P200, P011, P210) = [
        0.030303; 0.030303; 0.030303; 0.030303; 0.030303; 0.030303; 0.030303; 0.030303; 0.030303; 0.030303
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    ]
end solve block
P00 := result(0)
P40 := result(14)
P80 := result(18)
P120 := result(22)
P160 := result(26)
P200 := result(30)
P10 := result(11)
P50 := result(15)
P90 := result(19)
P130 := result(23)
P170 := result(27)
P210 := result(32)
P20 := result(12)
P60 := result(16)
P100 := result(20)
P140 := result(24)
P180 := result(28)
P30 := result(13)
P70 := result(17)
P110 := result(21)
P150 := result(25)
P190 := result(29)
P01 := result(1)
P04 := result(4)
P07 := result(7)
P010 := result(10)
μ := 12
P02 := result(2)
P05 := result(5)
P08 := result(8)
P011 := result(31)
λ := 12
P03 := result(3)
P06 := result(6)
P09 := result(9)
ω := μ/λ
n := 10
m := 20
L_очМ2 := P01*1 + P02*2 + P03*3 + P04*4 + P05*5 + P06*6 + P07*7 + P08*8 + P09*9 + P010*10 + P011*11
L_очЛ2 := P10*1 + P20*2 + P30*3 + P40*4 + P50*5 + P60*6 + P70*7 + P80*8 + P90*9 + P100*10 + P110*11 + P120*12 + P130*13 + P140*14 + P150*15 + P160*16 + P170*17 + P180*18 + P190*19 + P200*20 + P210*21
L_очМ2 = 2
L_очЛ2 = 7
W_cЛ := L_очЛ2/μ + 1/μ = 0.666667
W_сМ := L_очМ2/λ + 1/λ = 0.25
P_отк := P210 = 0.030303
P_уехать := 1 - P_отк = 0.969697
